// SBML level 2 version 4

model Plasmid_AB()
  // Plasmid_AB

  // Compartments:
  compartment E_Coli = 1; E_Coli is "E.Coli";

  // Species:
  species C in E_Coli = 2;
  species Cox in E_Coli = 2;
  species TetR in E_Coli = 2;
  species C2 in E_Coli = 0;
  species Cox4 in E_Coli = 0;
  species $Pe in E_Coli = 1;
  species $Pol in E_Coli = 1; Pol is "Pol.";
  species Pe_Pol_E_Coli in E_Coli = 0; Pe_Pol_E_Coli is "Pe+Pol";
  species mRNA_Cox in E_Coli = 0;
  species $pTet in E_Coli = 1;
  species pTet_Pol_E_Coli in E_Coli = 0; pTet_Pol_E_Coli is "pTet+Pol.";
  species mRNA_C in E_Coli = 0;
  species $pBAD in E_Coli = 1;
  species Ara in E_Coli = 0.5;
  species pBAD_Pol_E_Coli in E_Coli = 0; pBAD_Pol_E_Coli is "pBAD+Pol.";
  species mRNA in E_Coli = 0;
  species C2_Pe in E_Coli = 0; C2_Pe is "C2+Pe";
  species Pe_Cox4 in E_Coli = 0; Pe_Cox4 is "Pe+Cox4";
  species TetR_pTet in E_Coli = 0; TetR_pTet is "TetR+pTet";

  // Reactions:
  Dimerization: 2 C -> C2; MC*C - SC*C2;
    MC = 3; SC = 1;
  Tetramerization: 4 Cox -> Cox4; Tcox*Cox^4 - Scox*Cox4;
    Tcox = 0.2; Scox = 0.8;
  Pe_Pol: $Pol + $Pe -> Pe_Pol_E_Coli; Ppe*Pol*Pe - Ope*Pe_Pol_E_Coli; Pe_Pol is "Pe<>Pol.";
    Ppe = 0.3; Ope = 0.02;
  Scrip_Cox: Pe_Pol_E_Coli => mRNA_Cox + Pe_Pol_E_Coli; kpe*Pe_Pol_E_Coli; Scrip_Cox is "Scrip. Cox";
    kpe = 1;
  Slate_Cox: mRNA_Cox => Cox + mRNA_Cox; Slate_Cox_k*mRNA_Cox; Slate_Cox is "Slate. Cox";
    Slate_Cox_k = 1;
  pTet_Pol: $Pol + pTet_Pol_E_Coli + $pTet -> ; Pptet*Pol*pTet_Pol_E_Coli*pTet - Optet; pTet_Pol is "pTet<>Pol.";
    Pptet = 0.6; Optet = 0.02;
  Scrip_C: pTet_Pol_E_Coli => mRNA_C + pTet_Pol_E_Coli; kptet*pTet_Pol_E_Coli; Scrip_C is "Scrip. C";
    kptet = 1;
  Slate_C: mRNA_C => C + mRNA_C; Slate_C_k*mRNA_C;
    Slate_C_k = 1;
  pBAD_Pol: $Pol + Ara + $pBAD -> pBAD_Pol_E_Coli + Ara; Ppbad*Pol*Ara*pBAD - Opbad*pBAD_Pol_E_Coli*Ara; pBAD_Pol is "pBAD<>Pol.";
    Ppbad = 0.3; Opbad = 0.02;
  Scrip: pBAD_Pol_E_Coli => mRNA + pBAD_Pol_E_Coli; kpbad*pBAD_Pol_E_Coli; Scrip is "Scrip.";
    kpbad = 1;
  Slate: mRNA => Cox + TetR + mRNA; Slate_k*mRNA; Slate is "Slate.";
    Slate_k = 1;
  Inhib_C2: C2 + $Pe -> C2_Pe; IC*C2*Pe - RC*C2_Pe;
    IC = 0.8; RC = 1;
  Inhib_Cox4: $Pe + Cox4 -> Pe_Cox4; ICox*Pe*Cox4 - RCox*Pe_Cox4; Inhib_Cox4 is "Inhib. Cox4";
    ICox = 1; RCox = 1;
  Inhib_TetR: $pTet + TetR -> TetR_pTet; IT*pTet*TetR - RT*TetR_pTet; Inhib_TetR is "Inhib. TetR";
    IT = 0.7; RT = 1;
  C_Deg: C => ; DC*C; C_Deg is "C Deg.";
    DC = 0.2;
  Cox_Deg: Cox => ; DCox*Cox; Cox_Deg is "Cox Deg.";
    DCox = 0.2;
  TetR_Deg: TetR => ; DTetR*TetR; TetR_Deg is "TetR Deg.";
    DTetR = 0.2;
  Deg_mC: mRNA_C => ; Deg_mC_DRNA*mRNA_C; Deg_mC is "Deg. mC";
    Deg_mC_DRNA = 1;
  Deg_TetCox: mRNA => ; Deg_TetCox_DRNA*mRNA; Deg_TetCox is "Deg. TetCox";
    Deg_TetCox_DRNA = 1;
  Deg_Cox: mRNA_Cox => ; Deg_Cox_DRNA*mRNA_Cox; Deg_Cox is "Deg. Cox";
    Deg_Cox_DRNA = 1;
end
